*Heading
** Job name: Job-1 Model name: dam_concrete_analysis_1
** Generated by: Abaqus/CAE 2023
*Preprint, echo=NO, model=NO, history=NO, contact=NO
**
** PARTS
**
*Part, name=PART-1
*Node
      1,           0.,           0.
      2,          3.5,           0.
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*Element, type=CPS4R
   1,    1,    2,  102,  101
   2,    2,    3,  103,  102
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*Elset, elset=DAM
    1,    2,    3,    4,    5,    6
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** Section: Section-1-DAM
*Solid Section, elset=DAM, material=CONCRETE
1.,
*End Part
**
**
** ASSEMBLY
**
*Assembly, name=Assembly
**
*Instance, name=PART-1-1, part=PART-1
*End Instance
**
*Elset, elset=EOUT, instance=PART-1-1
 2320, 2420
*Nset, nset=NBASE, instance=PART-1-1, generate
  1,  21,   1
*Nset, nset=NMID, instance=PART-1-1, generate
 2401,  2421,     1
*Nset, nset=NOUT, instance=PART-1-1
    1, 3801
*Nset, nset=NTOP, instance=PART-1-1, generate
 3801,  3821,     1
*Nset, nset=NWL, instance=PART-1-1, generate
 3601,  3621,     1
*Elset, elset=WDAM, instance=PART-1-1, generate
    1,  3501,   100
*End Assembly
*Amplitude, name=HAMP
             0.,              0.,            0.01,         0.01265,            0.02,         0.01199,            0.03,         0.01133
           0.04,         0.01067,            0.05,         0.00981,            0.06,         0.00239,            0.07,        -0.00502
           0.08,        -0.01243,            0.09,        -0.01889,             0.1,        -0.01044,            0.11,        -0.00198
           0.12,         0.00647,            0.13,         0.00088,            0.14,        -0.01488,            0.15,        -0.02886
           0.16,        -0.02491,            0.17,        -0.02097,            0.18,        -0.01702,            0.19,        -0.01307
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            10.,         0.01514
*Amplitude, name=VAMP
             0.,              0.,            0.01,         0.00296,            0.02,        -0.00508,            0.03,        -0.01312
           0.04,        -0.01526,            0.05,        -0.00224,            0.06,         0.01079,            0.07,         0.02381
           0.08,         0.02397,            0.09,          0.0136,             0.1,         0.00323,            0.11,        -0.00713
           0.12,        -0.01489,            0.13,         0.00731,            0.14,          0.0295,            0.15,         0.00557
           0.16,        -0.05042,            0.17,        -0.06469,            0.18,        -0.05115,            0.19,         -0.0376
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            10.,         0.03064
**
** MATERIALS
**
*Material, name=CONCRETE
*Damping, beta=0.00323
*Density
2400.,
*Elastic
 2.5e+10, 0.15
*Concrete Damaged Plasticity
 36.31,0.,0.,0.,0.
*Concrete Compression Hardening
  1.3e+07,  0.
 2.41e+07, 0.1
*Concrete Tension Stiffening, type=DISPLACEMENT
     2.9e+06,          0.
 1.94393e+06,  6.6185e-05
 1.30305e+06,  0.00012286
     873463., 0.000173427
     585500.,  0.00022019
     392472., 0.000264718
     263082., 0.000308088
     176349.,  0.00035105
     118210., 0.000394138
     79238.8, 0.000437744
     53115.4, 0.000482165
*Concrete Tension Damage, type=DISPLACEMENT
       0.,         0.
 0.381217, 0.00066185
 0.617107,  0.0012286
 0.763072, 0.00173427
 0.853393,  0.0022019
 0.909282, 0.00264718
 0.943865, 0.00308088
 0.965265,  0.0035105
 0.978506, 0.00394138
   0.9867, 0.00437744
  0.99177, 0.00482165
**
** BOUNDARY CONDITIONS
**
** Name: Disp-BC-1 Type: Displacement/Rotation
*Boundary
NBASE, 1, 1
** Name: Disp-BC-2 Type: Displacement/Rotation
*Boundary
NBASE, 2, 2
** ----------------------------------------------------------------
**
** STEP: Step-1
**
*Step, name=Step-1, nlgeom=YES, unsymm=YES
STEP 1 - GRAVITY LOAD
*Static
1e-10, 1e-10, 1e-15, 1e-10
**
** LOADS
**
** Name: GRAVITY-1   Type: Gravity
*Dload
PART-1-1.DAM, GRAV, 9.81, 0., -1.
**
** OUTPUT REQUESTS
**
*Restart, write, frequency=0
**
** FIELD OUTPUT: F-Output-1
**
*Output, field, frequency=10
*Element Output, directions=YES
DAMAGEC, DAMAGET, LE, PE, PEEQ, PEEQT, S, SDEG
**
** FIELD OUTPUT: F-Output-2
**
*Output, field, variable=PRESELECT, frequency=10
**
** HISTORY OUTPUT: H-Output-1
**
*Output, history
*Element Output, elset=EOUT
SP1,
**
** HISTORY OUTPUT: H-Output-2
**
*Node Output, nset=NOUT
U1, U2, U3, UR1, UR2, UR3
**
** HISTORY OUTPUT: H-Output-3
**
*Output, history, variable=PRESELECT
*End Step
** ----------------------------------------------------------------
**
** STEP: Step-2
**
*Step, name=Step-2, nlgeom=YES, unsymm=YES
STEP 2 - HYDROSTATIC LOAD
*Static
1e-10, 1e-10, 1e-15, 1e-10
**
** OUTPUT REQUESTS
**
*Restart, write, frequency=0
**
** FIELD OUTPUT: F-Output-3
**
*Output, field, frequency=10
*Element Output, directions=YES
DAMAGEC, DAMAGET, LE, PE, PEEQ, PEEQT, S, SDEG
**
** FIELD OUTPUT: F-Output-4
**
*Output, field, variable=PRESELECT, frequency=10
**
** HISTORY OUTPUT: H-Output-4
**
*Output, history
*Element Output, elset=EOUT
SP1,
**
** HISTORY OUTPUT: H-Output-5
**
*Node Output, nset=NOUT
U1, U2, U3, UR1, UR2, UR3
**
** HISTORY OUTPUT: H-Output-6
**
*Output, history, variable=PRESELECT
*End Step
** ----------------------------------------------------------------
**
** STEP: Step-3
**
*Step, name=Step-3, nlgeom=YES, inc=2000, unsymm=YES
STEP 3 - EARTHQUAKE
*Dynamic,haftol=1e+07
0.02,10.,1e-15,0.02
**
** BOUNDARY CONDITIONS
**
** Name: Acc-BC-1 Type: Acceleration/Angular acceleration
*Boundary, op=NEW, amplitude=HAMP, type=ACCELERATION
NBASE, 1, 1, 9.81
** Name: Acc-BC-2 Type: Acceleration/Angular acceleration
*Boundary, op=NEW, amplitude=VAMP, type=ACCELERATION
NBASE, 2, 2, 9.81
** Name: Disp-BC-1 Type: Displacement/Rotation
*Boundary, op=NEW
** Name: Disp-BC-2 Type: Displacement/Rotation
*Boundary, op=NEW
**
** CONTROLS
**
*Controls, reset
*Controls, analysis=discontinuous
**
** OUTPUT REQUESTS
**
*Restart, write, frequency=0
**
** FIELD OUTPUT: F-Output-5
**
*Output, field
*Element Output, directions=YES
DAMAGEC, DAMAGET, LE, PE, PEEQ, PEEQT, S, SDEG
**
** FIELD OUTPUT: F-Output-6
**
*Output, field, variable=PRESELECT
**
** HISTORY OUTPUT: H-Output-7
**
*Output, history, frequency=1
*Element Output, elset=EOUT
SP1,
**
** HISTORY OUTPUT: H-Output-8
**
*Node Output, nset=NOUT
U1, U2, U3, UR1, UR2, UR3
**
** HISTORY OUTPUT: H-Output-9
**
*Output, history, variable=PRESELECT, frequency=1
*End Step
